// SBML level 3 version 2

model sbolcanvas_model()

  // Compartments:
  compartment Cell = 1;

  // Species:
  substanceOnly species Pars in Cell = 2;
  substanceOnly species PlacIQ in Cell = 2;
  substanceOnly species arsR_Protein in Cell = 0;
  substanceOnly species NaAsO2 in Cell = 0;
  substanceOnly species NaAsO2_arsR_complex in Cell = 0;
  substanceOnly species Pars_mRNA in Cell = 0;

  // Reactions:
  Production_Pars: => 10 Pars_mRNA; Pars*(kb*(Production_Pars_ko_f/Production_Pars_ko_r)*Production_Pars_nr + ka*(kao_f/kao_r)*Production_Pars_nr*(ka_NaAsO2_arsR_complex_f/ka_NaAsO2_arsR_complex_r*NaAsO2_arsR_complex)^nc_NaAsO2_arsR_complex_a)/(1 + Production_Pars_ko_f/Production_Pars_ko_r*Production_Pars_nr + kao_f/kao_r*Production_Pars_nr*(ka_NaAsO2_arsR_complex_f/ka_NaAsO2_arsR_complex_r*NaAsO2_arsR_complex)^nc_NaAsO2_arsR_complex_a);  // modifiers: Pars, NaAsO2_arsR_complex
    kb = 0.0001; ka = 0.25; Production_Pars_ko_f = 0.033; Production_Pars_ko_r = 1; kao_f = 1; kao_r = 1; Production_Pars_nr = 30; ka_NaAsO2_arsR_complex_f = 0.0033; ka_NaAsO2_arsR_complex_r = 1; nc_NaAsO2_arsR_complex_a = 2;
  Production_PlacIQ: => 10 arsR_Protein; PlacIQ*ko*(Production_PlacIQ_ko_f/Production_PlacIQ_ko_r)*Production_PlacIQ_nr/(1 + Production_PlacIQ_ko_f/Production_PlacIQ_ko_r*Production_PlacIQ_nr);  // modifiers: PlacIQ
    ko = 0.05; Production_PlacIQ_ko_f = 0.033; Production_PlacIQ_ko_r = 1; Production_PlacIQ_nr = 30;
  Complex_NaAsO2_arsR_complex: NaAsO2 + arsR_Protein -> NaAsO2_arsR_complex; kc_f*NaAsO2^nc_NaAsO2*arsR_Protein^nc_arsR_Protein - kc_r*NaAsO2_arsR_complex;
    nc_NaAsO2 = 2; nc_arsR_Protein = 2; kc_f = 0.05; kc_r = 1;

  // Events:
  HIGH_Ars: at (2000) after (true), t0=false, persistent=false, fromTrigger=false: NaAsO2 = 1000;
end
